// SBML level 2 version 4

model main()

  // Compartments:
  compartment c = 1.660539e-15;

  // Species:
  species s_id0 in c = 2; s_id0 is "Kon";
  species s_id1 in c = 0; s_id1 is "Kint";
  species s_id2 in c = 1; s_id2 is "Koff";
  species s_id3 in c = 1; s_id3 is "Pon";
  species s_id4 in c = 0; s_id4 is "Pint";
  species s_id5 in c = 2; s_id5 is "Poff";

  // Reactions:
  r_id6: s_id2 + s_id0 => s_id1 + s_id0; r_id6_c_size*r_id6_k*s_id2*s_id0;
    r_id6_c_size = 1.660539e-15 volume; r_id6_k = 1 k_unit_2;
  r_id7: s_id1 + s_id0 => 2 s_id0; r_id7_c_size*r_id7_k*s_id1*s_id0;
    r_id7_c_size = 1.660539e-15 volume; r_id7_k = 1 k_unit_2;
  r_id8: s_id0 + s_id3 => s_id1 + s_id3; r_id8_c_size*r_id8_k*s_id0*s_id3;
    r_id8_c_size = 1.660539e-15 volume; r_id8_k = 1 k_unit_2;
  r_id9: s_id1 + s_id3 => s_id2 + s_id3; r_id9_c_size*r_id9_k*s_id1*s_id3;
    r_id9_c_size = 1.660539e-15 volume; r_id9_k = 1 k_unit_2;
  r_id10: s_id5 + s_id3 => s_id4 + s_id3; r_id10_c_size*r_id10_k*s_id5*s_id3;
    r_id10_c_size = 1.660539e-15 volume; r_id10_k = 1 k_unit_2;
  r_id11: s_id4 + s_id3 => 2 s_id3; r_id11_c_size*r_id11_k*s_id4*s_id3;
    r_id11_c_size = 1.660539e-15 volume; r_id11_k = 1 k_unit_2;
  r_id12: s_id3 + s_id0 => s_id4 + s_id0; r_id12_c_size*r_id12_k*s_id3*s_id0;
    r_id12_c_size = 1.660539e-15 volume; r_id12_k = 1 k_unit_2;
  r_id13: s_id4 + s_id0 => s_id5 + s_id0; r_id13_c_size*r_id13_k*s_id4*s_id0;
    r_id13_c_size = 1.660539e-15 volume; r_id13_k = 1 k_unit_2;

  // Unit definitions:
  unit time = second;
  unit substance = 1e-9 mole;
  unit volume = litre;
  unit dimless = dimensionless;
  unit concentration = 1e-9 mole / litre;
  unit k_unit_2 = litre / (second * 1e-9 mole);
end
